*Heading
** Job name: Job Model name: Model-1
** Generated by: Abaqus/CAE 6.12-1
*Preprint, echo=NO, model=NO, history=NO, contact=NO
**
** PARTS
**
*Part, name=Part-1
*Node
      1,          -5.,           0.,           0.
      2,  -4.16666651,           0.,           0.
      3,  -3.33333325,           0.,           0.
      4,         -2.5,           0.,           0.
      5,  -1.66666663,           0.,           0.
      6, -0.833333313,           0.,           0.
      7,           0.,           0.,           0.
      8,  0.833333313,           0.,           0.
      9,   1.66666663,           0.,           0.
     10,          2.5,           0.,           0.
     11,   3.33333325,           0.,           0.
     12,   4.16666651,           0.,           0.
     13,           5.,           0.,           0.
*Element, type=B31
 1,  1,  2
 2,  2,  3
 3,  3,  4
 4,  4,  5
 5,  5,  6
 6,  6,  7
 7,  7,  8
 8,  8,  9
 9,  9, 10
10, 10, 11
11, 11, 12
12, 12, 13
*Nset, nset=Set-1, generate
  1,  13,   1
*Elset, elset=Set-1, generate
  1,  12,   1
*Nset, nset=Set-2, generate
  1,  13,   1
*Elset, elset=Set-2, generate
  1,  12,   1
*Nset, nset=_PickedSet5, internal, generate
  1,  13,   1
*Elset, elset=_PickedSet5, internal, generate
  1,  12,   1
** Section: Section-1  Profile: Profile-1
*Beam Section, elset=Set-1, material=Material-1, temperature=GRADIENTS, section=RECT
0.06, 0.04
0.,0.,-1.
*End Part
**
**
** ASSEMBLY
**
*Assembly, name=Assembly
**
*Instance, name=Part-1-1, part=Part-1
*End Instance
**
*Nset, nset=Set-1, instance=Part-1-1
 1,
*Nset, nset=_PickedSet5, internal, instance=Part-1-1
 13,
*Nset, nset=_PickedSet6, internal, instance=Part-1-1
 1,
*Nset, nset=Ne, instance=Part-1-1
 13,
*Nset, nset=Nmid, instance=Part-1-1
 7,
*Nset, nset=Ns, instance=Part-1-1
 1,
*End Assembly
**
** MATERIALS
**
*Material, name=Material-1
*Elastic
 2.5e+10, 0.25
** ----------------------------------------------------------------
**
** STEP: ToBend
**
*Step, name=ToBend, nlgeom=YES, inc=500
*Static
0.01, 1., 1e-10, 0.1
**
** BOUNDARY CONDITIONS
**
** Name: BC_end Type: Displacement/Rotation
*Boundary
_PickedSet5, 2, 2
_PickedSet5, 3, 3
_PickedSet5, 6, 6, -1.5708
** Name: BC_mid Type: Displacement/Rotation
*Boundary
Nmid, 1, 1
** Name: BC_start Type: Displacement/Rotation
*Boundary
_PickedSet6, 2, 2
_PickedSet6, 3, 3
_PickedSet6, 6, 6, 1.5708
**
** OUTPUT REQUESTS
**
*Restart, write, frequency=0
**
** FIELD OUTPUT: F-Output-1
**
*Output, field
*Node Output
CF, RF, RM, RT, TF, U, UR, UT
*Element Output, directions=YES
ENER, LE, MISES, NFORC, NFORCSO, PE, PEEQ, PEMAG, S, SE, SF, SSAVG, TRNOR, TRSHR
**
** HISTORY OUTPUT: H-Output-1
**
*Output, history, variable=PRESELECT
*End Step
** ----------------------------------------------------------------
**
** STEP: ToFlip
**
*Step, name=ToFlip, nlgeom=YES
*Static
0.01, 1., 1e-08, 0.05
**
** BOUNDARY CONDITIONS
**
** Name: BC_end Type: Displacement/Rotation
*Boundary, op=NEW
_PickedSet5, 2, 2
_PickedSet5, 3, 3
_PickedSet5, 4, 4
_PickedSet5, 5, 5, -1.5708
_PickedSet5, 6, 6, -1.5708
** Name: BC_mid Type: Displacement/Rotation
*Boundary, op=NEW
** Name: BC_start Type: Displacement/Rotation
*Boundary, op=NEW
_PickedSet6, 2, 2
_PickedSet6, 3, 3
_PickedSet6, 4, 4
_PickedSet6, 5, 5, 1.5708
_PickedSet6, 6, 6, 1.5708
**
** OUTPUT REQUESTS
**
*Restart, write, frequency=0
**
** FIELD OUTPUT: F-Output-1
**
*Output, field
*Node Output
CF, RF, RM, RT, TF, U, UR, UT
*Element Output, directions=YES
ENER, LE, MISES, NFORC, NFORCSO, PE, PEEQ, PEMAG, S, SE, SF, SSAVG, TRNOR, TRSHR
**
** HISTORY OUTPUT: H-Output-1
**
*Output, history, variable=PRESELECT
*End Step
** ----------------------------------------------------------------
**
** STEP: ToMove
**
*Step, name=ToMove, nlgeom=YES
*Static
0.1, 1., 1e-08, 1.
**
** BOUNDARY CONDITIONS
**
** Name: BC_end Type: Displacement/Rotation
*Boundary
_PickedSet5, 1, 1, -4.
** Name: BC_start Type: Displacement/Rotation
*Boundary
_PickedSet6, 1, 1, 4.
**
** OUTPUT REQUESTS
**
*Restart, write, frequency=0
**
** FIELD OUTPUT: F-Output-1
**
*Output, field
*Node Output
CF, RF, RM, RT, TF, U, UR, UT
*Element Output, directions=YES
ENER, LE, MISES, NFORC, NFORCSO, PE, PEEQ, PEMAG, S, SE, SF, SSAVG, TRNOR, TRSHR
**
** HISTORY OUTPUT: H-Output-1
**
*Output, history, variable=PRESELECT
*End Step
** ----------------------------------------------------------------
**
** STEP: ToRotate
**
*Step, name=ToRotate, nlgeom=YES
*Static
0.1, 1., 1e-05, 0.1
**
** BOUNDARY CONDITIONS
**
** Name: BC_end Type: Displacement/Rotation
*Boundary
_PickedSet5, 6, 6, -2.0944
** Name: BC_start Type: Displacement/Rotation
*Boundary
_PickedSet6, 6, 6, 2.0944
**
** OUTPUT REQUESTS
**
*Restart, write, frequency=0
**
** FIELD OUTPUT: F-Output-1
**
*Output, field
*Node Output
CF, RF, RM, RT, TF, U, UR, UT
*Element Output, directions=YES
ENER, LE, MISES, NFORC, NFORCSO, PE, PEEQ, PEMAG, S, SE, SF, SSAVG, TRNOR, TRSHR
**
** HISTORY OUTPUT: H-Output-1
**
*Output, history, variable=PRESELECT
*End Step
